// SBML level 3 version 1

function hill(V, s, Shalve, h)
  V*(s/Shalve)^h/(1 + (s/Shalve)^h);
end

function MM(V, s, Km)
  V*s/(Km + s);
end

model main()

  // Compartments:
  compartment Compartment = 1;

  // Species:
  species S1 in Compartment = 0.1/Compartment;  // substance in dimensionless
  species S2 in Compartment = 1/Compartment;  // substance in dimensionless
  species S3 in Compartment = 1/Compartment;  // substance in dimensionless

  // Parameters:
  c1 = 1 dimensionless;
  Shalve = 0.1 dimensionless;
  Vh = 0.1 dimensionless;
  h = 0.1 dimensionless;
  Vmm = 0.1 dimensionless;
  Km = 0.1 dimensionless;
  v1 = 0.1 dimensionless;
  k4 = 0.1 dimensionless;
  s = 3 dimensionless;
  observable_Obs_1 has dimensionless;
  observable_Obs_2 has dimensionless;

  // Assignment rules:
  t := time;
  observable_Obs_1 := S1 + S2;
  observable_Obs_2 := s*S3;

  // Rate rules:
  S1' = v19 - MM(S1, Vmm, Km)*c1^2;
  S2' = MM(S1, Vmm, Km) - hill(S2, Shalve, Vh, h);
  S3' = hill(S2, Shalve, Vh, h) - k4*S3 + log10(c1);
end
